V1 := [8; 7; 2]
V2 := [5; 3; 4]
mod := |V1| = 10.8167
vec := V1×V2 = [22; -22; -11]
cos1 := V1*V2/(|V1|*|V2|) = 0.902134
scal := V1*V2 = 69
PView := [3; 3; 2]
R[0] := PView[0]*cos(PView[1])*sin(PView[2])
R[1] := PView[0]*sin(PView[1])*sin(PView[2])
R[2] := PView[0]*cos(PView[2])
R = [-2.70059; 0.38496; -1.24844]
