A := [2, 8, 5; 1, 10, 5; 9, 9, 3]
B := [5, 6, 6; 2, 8, 2; 2, 6, 3]
V1 := [8; 7; 2]
V2 := [5; 3; 4]
C1 := A + B = [7, 14, 11; 3, 18, 7; 11, 15, 6]
C2 := A*B = [36, 106, 43; 35, 116, 41; 69, 144, 81]
D := A*V1 = [82; 88; 141]
q := transpose(V1)*V2 = 69
p := transpose(V1)*A*V2 = 985
